i := 0, 1 .. 20
y[i, 0] := 1 + 0.2*i
solve block
    # guess values
    x := y
    # constraints
    ln(sin(x)^2) + 0.2*x == 0
    # solver
    z := find(x) = [1.10858; 1.10858; 1.10858; 1.10858; 2.21165; 2.21165; 2.21165; 2.21165; 2.21165; 2.21165; 2.21165; 3.88658; 3.88658; 3.88658; 3.88658; 3.88658; 3.88658; 3.88658; 3.88658; 1.10858; 5.6808]
end solve block
y = [1; 1.2; 1.4; 1.6; 1.8; 2; 2.2; 2.4; 2.6; 2.8; 3; 3.2; 3.4; 3.6; 3.8; 4; 4.2; 4.4; 4.6; 4.8; 5]
