integral(exp(x)*cos(x)^2, x = 0 .. π) = 13.2844
solve block
    # guess values
    a := 0.861
    # constraints
    integral(x^0.3*(ln(1.1*x) + x), x = 0.1 .. a) == 0
    # solver
    find(a) = 0.972776
end solve block
solve block
    # guess values
    x1 := 1
    x2 := 2
    x3 := 3
    x4 := 1
    # constraints
    1.5*x1 + 3.9*x2 + 0.8*x3 + 9*x4 == -0.3
    2.3*x1 - 3*x2 + 4.1*x3 - 8.2*x4 == 1.5
    4.4*x1 + 5*x2 - 0.9*x3 + 7.6*x4 == 9
    1.8*x1 + 0.2*x2 + 6.2*x3 - 3*x4 == 0.1
    # solver
    find(x1, x2, x3, x4) = [1.2697; 2.20229; -0.962435; -1.11373]
end solve block
solve block
    # guess values
    x := 1
    # constraints
    3*ln(x)^2 + 6*ln(x) - 5 == 0
    # solver
    find(x) = 1.88324
end solve block
M := [1.5, 3.9, 0.8, 9; 2.3, -3, 4.1, -8.2; 4.4, 5, -0.9, 7.6; 1.8, 0.2, 6.2, -3]
A := eigenvals(M) = [8.83379; -1.37609 + 1.27486i; -1.37609 - 1.27486i; -11.4816]
B := eigenvec(M, A[3]) = [0.447864; -0.692667; 0.416023; -0.382824]
B := B*(-1.54527/B[0]) = [-1.54527; 2.38992; -1.43541; 1.32086]
k := 4, 4.5 .. 9
# -1.54527
VX := [3.2; 4.3; 5; 6.7; 7.5; 8.2; 9.1; 10]
VY := [4.4; 2.5; -0.7; -6.8; -7.6; -3.3; 6.5; 8.5]
interp(cspline(VX, VY), VX, VY, k) = [3.61266; 1.62713; -0.7; -2.81537; -4.64287; -6.2257; -7.54219; -7.6; -5.04224; -0.0973312; 5.52054]
