# Worksheet setting: ORIGIN = 1
ORIGIN := 1
i := 1, 2 .. 5
j := 1, 2 .. 5
n := length(xg)
A[i, j] := sum(xg[k]^(i + j - 2), k = 1 .. n)
A = [
    8, 16.8, 38.88, 96.498, 251.173;
    16.8, 38.88, 96.498, 251.173, 675.112;
    38.88, 96.498, 251.173, 675.112, 1855.26;
    96.498, 251.173, 675.112, 1855.26, 5179.78;
    251.173, 675.112, 1855.26, 5179.78, 14632
]
B[i] := sum(yg[k]*xg[k]^(i - 1), k = 1 .. n)
B = [13.6; 38.29; 112.965; 335.33; 990.403]
solve block
    # guess values
    X := [1; 1; 1; 1; 1]
    # constraints
    A*X == B
    # solver
    Alp := find(X) = [-239.106; 594.508; -519.447; 189.081; -24.3302]
end solve block
F(x) := [1; x; x^2; x^3; x^4]
i := 1, 2 .. 8
P[i] := sum(Alp[j]*xg[i]^(j - 1), j = 1 .. 5)
P =  # error: Эта переменная не определена. Проверьте правильность установки обозначения.
govno := linfit(xg, yg, F)
yres2[i] := sum(govno[j]*xg[i]^(j - 1), j = 1 .. 5)
yres[i] := sum(Alp[j]*xg[i]^(j - 1), j = 1 .. 5)
otkl[i] := (yres[i] - yg[i])^2
otkl2[i] := (yres2[i] - yg[i])^2
yres =  # error
yg =  # error
yres2 =  # error
otkl =  # error
otkl2 =  # error
sumotck := sum(otkl[j], j = 1 .. 8)
sumotck2 := sum(otkl2[j], j = 1 .. 8)
y[1] := 1
a := 0
b := 0.5
h := 0.02
n := (b - a)/h = 25
F(x, y) := (exp(x)*x - y)/2
solution := rkfixed(y, a, b, n, F)
xg := [1.1; 1.3; 1.6; 2.1; 2.2; 2.6; 2.9; 3]
yg := [2.1; 2.8; -4.4; 3.6; -8.7; 7.2; 7.6; 3.4]
r := regress(xg, yg, 4) = [3; 3; 4; -239.106; 594.508; -519.447; 189.081; -24.3302]
i := 1 .. 8
solution = [
    0, 1;
    0.02, 0.990151;
    0.04, 0.980607;
    0.06, 0.971373;
    0.08, 0.962455;
    0.1, 0.953859;
    0.12, 0.945591;
    0.14, 0.937655;
    0.16, 0.93006;
    0.18, 0.922812;
    0.2, 0.915916;
    0.22, 0.909381;
    0.24, 0.903214;
    0.26, 0.897422;
    0.28, 0.892012;
    0.3, 0.886994;
    0.32, 0.882374;
    0.34, 0.878163;
    0.36, 0.874368;
    0.38, 0.870998;
    0.4, 0.868064;
    0.42, 0.865575;
    0.44, 0.863541;
    0.46, 0.861972;
    0.48, 0.860878;
    0.5, 0.860272
]
interp(r, xg, yg, xg[i]) = [2.36612; 1.80931; -2.65393; -3.50079; -1.9306; 6.60351; 7.07843; 3.82795]
yg = [2.1; 2.8; -4.4; 3.6; -8.7; 7.2; 7.6; 3.4]
# sin((x - 0.73)^2 + 0.33 * y^2)
solve block
    # guess values
    x := 1.5
    y := 1.3
    G(x, y) := sin((x - 0.73)^2 + 0.33*y^2) + cos(0.51*(x - 0.79)^2 + 1.35*(y - 1.38)^2) + 0.78*x^2 + 0.91*y^2
    # solver
    sol := minimize(G, x, y) = [0.401424; -0.109935]
    G(sol[1], sol[2]) = -0.749303
end solve block
xg := [1.1; 1.3; 1.6; 2.1; 2.2; 2.6; 2.9; 3]
yg = [2.1; 2.8; -4.4; 3.6; -8.7; 7.2; 7.6; 3.4]
M := [16.8, 38.88, 96.5, 251.17, □; □, □, □, □, □; □, □, □, □, □; □, □, □, □, □; □, □, □, □, □]  # error: Отсутствует элемент или выражение.
ORIGIN := 1
i := 1 .. 5
j := 1 .. 5
B[i] := sum(yg[k]*xg[k]^(i - 1), k = 1 .. 8)
M[i, j] := sum(xg[k]^(i + j - 1), k = 1 .. 8)
M = [
    16.8, 38.88, 96.498, 251.173, 675.112;
    38.88, 96.498, 251.173, 675.112, 1855.26;
    96.498, 251.173, 675.112, 1855.26, 5179.78;
    251.173, 675.112, 1855.26, 5179.78, 14632;
    675.112, 1855.26, 5179.78, 14632, 41702.9
]
B = [13.6; 38.29; 112.965; 335.33; 990.403]
solve block
    # guess values
    X := [0; 0; 0; 0; 0]
    # constraints
    M*X == B
    # solver
    X := find(X) = [-67.1879; 187.327; -175.693; 66.8791; -8.86541]
end solve block
F(x, y) := sin((x - 0.73)^2 + 0.33*y^2) + cos(0.51*(x - 0.79)^2 + 1.35*(y - 1.38)^2) + 0.78*x^2 + 0.91*y^2
x := 1.5
y := 1.3
minimize(F, x, y) = [0.401424; -0.109935]
yg = [2.1; 2.8; -4.4; 3.6; -8.7; 7.2; 7.6; 3.4]
i := 1 .. 8
P[i] := sum(X[j]*xg[i]^(j - 1), j = 1 .. 5) = [2.31999; 1.02947; -1.40169; -1.65462; -0.970759; 2.51746; 2.5637; 1.19422]
solve block
    # guess values
    x := 0
    y := 0
    f(x, y) := 20*x + 0.4*y + exp(3.81*x^2 + 0.3*y^2)
    # solver
    A := minimize(f, x, y) = [-0.615431; -0.156319]
    f(A[1], A[2]) = -8.10638
end solve block
